*Heading
** Job name: Volta Model name: Model-1
** Generated by: Abaqus/CAE 2022
*Preprint, echo=NO, model=NO, history=NO, contact=NO
**
** PARTS
**
*Part, name=Volta
*Node
      1,           0.,        3300.,   114.990471
      2,         200.,        3300.,   225.588654
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*Element, type=S4
 1,   1,  17, 337,  32
 2,  17,  18, 338, 337
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*Element, type=S3
101, 3513, 3470, 3471
102, 7406, 6486, 6325
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*Nset, nset=Set-1, generate
    1,  7809,     1
*Elset, elset=Set-1, generate
    1,  7768,     1
** Region: (Section-1:Set-1), (Controls:EC-1)
*Elset, elset=_I1, internal
    1,    2,    3,    4,    5,    6
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** Section: Section-1
*Shell Section, elset=_I1, material=Masonry, controls=EC-1
20., 5
** Region: (Section-1:Set-1), (Controls:Default)
*Elset, elset=_I2, internal, generate
 101,  320,    1
** Section: Section-1
*Shell Section, elset=_I2, material=Masonry
20., 5
*End Part
**
**
** ASSEMBLY
**
*Assembly, name=Assembly
**
*Instance, name=Volta-1, part=Volta
*End Instance
**
*Nset, nset=Set-1, instance=Volta-1
  4,  8, 12, 15
*Elset, elset=_Surf-1_SPOS, internal, instance=Volta-1, generate
    1,  7768,     1
*Surface, type=ELEMENT, name=Surf-1
_Surf-1_SPOS, SPOS
*End Assembly
**
** ELEMENT CONTROLS
**
*Section Controls, name=EC-1, ELEMENT DELETION=YES
1., 1., 1.
*Amplitude, name=Amp-1
           0.01,            0.01,            0.02,            0.02,            0.03,            0.03,            0.04,            0.04
           0.05,            0.05,            0.06,            0.06,            0.07,            0.07,            0.08,            0.08
           0.09,            0.09,             0.1,             0.1,            0.11,            0.11,            0.12,            0.12
           0.13,            0.13,            0.14,            0.14,            0.15,            0.15,            0.16,            0.16
           0.17,            0.17,            0.18,            0.18,            0.19,            0.19,             0.2,             0.2
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           0.97,            0.97,            0.98,            0.98,            0.99,            0.99,              1.,              1.
**
** MATERIALS
**
*Material, name=Masonry
*Density
 1.8e-09,
*Elastic
 3747.5, 0.2
*Concrete Damaged Plasticity
35.,   0.1,  1.16,  0.67, 1e-05
*Concrete Compression Hardening
 5.27759,       0.
 5.59866, 0.000166
  5.8194, 0.000253
  6.0602, 0.000342
  6.2408, 0.000465
  6.4214, 0.000613
 6.56187, 0.000807
 6.60201, 0.000988
 6.62207, 0.001217
 6.58194, 0.001422
 6.56187,  0.00157
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 1.44482,  0.00736
*Concrete Tension Stiffening
   0.22042,       0.
  0.218511,  4.9e-05
  0.214695,  5.2e-05
  0.209447,  5.7e-05
  0.204676,    6e-05
  0.199905,  6.3e-05
  0.194179,  7.1e-05
  0.188454,  7.6e-05
  0.183683,  8.1e-05
  0.177958,  9.1e-05
  0.170802,   0.0001
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 0.0281489, 0.000578
*Concrete Compression Damage
     0.,       0.
     0., 0.000109
     0., 0.000166
     0., 0.000253
     0., 0.000342
     0., 0.000465
     0., 0.000613
     0., 0.000807
     0., 0.000988
     0., 0.001217
 0.0061, 0.001422
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 0.7818,  0.00736
*Concrete Tension Damage
     0.,       0.
 0.0087,  4.9e-05
  0.026,  5.2e-05
 0.0498,  5.7e-05
 0.0714,    6e-05
 0.0931,  6.3e-05
  0.119,  7.1e-05
  0.145,  7.6e-05
 0.1667,  8.1e-05
 0.1926,  9.1e-05
 0.2251,   0.0001
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 0.8571, 0.000555
*Concrete Failure, TYPE=Strain
0.000578,0.007566,0.8723,0.8061
** ----------------------------------------------------------------
**
** STEP: Step-1
**
*Step, name=Step-1, nlgeom=YES
*Dynamic, Explicit
, 1.
*Bulk Viscosity
0.06, 1.2
**
** BOUNDARY CONDITIONS
**
** Name: BC-1 Type: Displacement/Rotation
*Boundary
Set-1, 1, 1
Set-1, 2, 2
Set-1, 3, 3
**
** LOADS
**
** Name: Load-1   Type: Pressure
*Dsload
Surf-1, P, 0.003
** Name: Load-2   Type: Gravity
*Dload
, GRAV, 9810., 0., 0., -1.
**
** OUTPUT REQUESTS
**
*Restart, write, number interval=1, time marks=NO
**
** FIELD OUTPUT: F-Output-1
**
*Output, field, time interval=0.01
*Node Output
A, RF, U, V
*Element Output, directions=YES
DAMAGEC, DAMAGET, EVF, LE, PE, PEEQ, PEEQVAVG, PEVAVG, S, STATUS, SVAVG
*Contact Output
CSTRESS,
**
** HISTORY OUTPUT: H-Output-1
**
*Output, history, variable=PRESELECT
*End Step
