*Heading
** Job name: Job-1 Model name: Model-1
** Generated by: Abaqus/CAE 2022
*Preprint, echo=NO, model=NO, history=NO, contact=NO
**
** PARTS
**
*Part, name=Volta
*Node
      1,           0.,        3300.,   114.990471
      2,         200.,        3300.,   225.588654
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*Element, type=S4R
1,   1,  17, 157,  20
2,  17,   2,  18, 157
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*Element, type=S3
17, 1871, 1880,  982
18, 1873,  966,  986
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*Nset, nset=Set-1, generate
    1,  1956,     1
*Elset, elset=Set-1, generate
    1,  1911,     1
** Section: Section-1
*Shell Section, elset=Set-1, material=Masonry
35., 5
*End Part
**
**
** ASSEMBLY
**
*Assembly, name=Assembly
**
*Instance, name=Volta-1, part=Volta
*End Instance
**
*Nset, nset=Set-1, instance=Volta-1
   1,   2,   3,   4,   5,   6
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*Elset, elset=Set-1, instance=Volta-1, generate
  1,  16,   1
*Nset, nset=Set-2, instance=Volta-1
  4,  8, 12, 15
*Elset, elset=_Surf-1_SPOS, internal, instance=Volta-1, generate
    1,  1911,     1
*Surface, type=ELEMENT, name=Surf-1
_Surf-1_SPOS, SPOS
*End Assembly
*Amplitude, name=Amp-1
           0.01,            0.01,            0.02,            0.02,            0.03,            0.03,            0.04,            0.04
           0.05,            0.05,            0.06,            0.06,            0.07,            0.07,            0.08,            0.08
           0.09,            0.09,             0.1,             0.1,            0.11,            0.11,            0.12,            0.12
           0.13,            0.13,            0.14,            0.14,            0.15,            0.15,            0.16,            0.16
           0.17,            0.17,            0.18,            0.18,            0.19,            0.19,             0.2,             0.2
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           0.97,            0.97,            0.98,            0.98,            0.99,            0.99,              1.,              1.
**
** MATERIALS
**
*Material, name=Masonry
*Density
 1.8e-09,
*Elastic
 3747.5, 0.2
** ----------------------------------------------------------------
**
** STEP: Step-1
**
*Step, name=Step-1, nlgeom=NO, perturbation
*Frequency, eigensolver=Lanczos, sim, acoustic coupling=on, normalization=mass
6, , , , ,
**
** BOUNDARY CONDITIONS
**
** Name: BC-1 Type: Displacement/Rotation
*Boundary
Set-2, 1, 1
Set-2, 2, 2
Set-2, 3, 3
**
** OUTPUT REQUESTS
**
*Restart, write, frequency=0
**
** FIELD OUTPUT: F-Output-1
**
*Output, field, variable=PRESELECT
**
** HISTORY OUTPUT: H-Output-1
**
*Output, history, variable=PRESELECT
*End Step
