*Heading
** Job name: Shear_23 Model name: Model-1
** Generated by: Abaqus/CAE Student Edition 2019
*Preprint, echo=NO, model=NO, history=NO, contact=NO
**
** PARTS
**
*Part, name=Viga
*End Part
**
**
** ASSEMBLY
**
*Assembly, name=Assembly
**
*Instance, name=Viga-1, part=Viga
*Node
      1,         600.,         250.,           0.
      2,         600.,         250.,         100.
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*Element, type=S4R
 1,   1,  17, 191,  36
 2,  17,   2,  18, 191
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*Nset, nset=Set-1
   1,   4,   5,   8,   9,  11
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*Elset, elset=Set-1
  61,  62,  63,  64,  65,  66
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*Nset, nset=Set-2
   1,   2,   3,   4,   5,   6
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*Elset, elset=Set-2
   1,   2,   3,   4,   5,   6
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*Nset, nset=Set-3
   1,   2,   3,   4,   5,   6
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*Elset, elset=Set-3
  41,  42,  43,  44,  45,  46
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
** Section: Rig
*Shell Section, elset=Set-2, material=Acero
40., 5
** Section: Ala
*Shell Section, elset=Set-3, material=Acero
40., 5
** Section: Alma
*Shell Section, elset=Set-1, material=Acero
6., 5
*End Instance
**
*Nset, nset=Set-1, instance=Viga-1
  11,  12,  14, 121, 151
*Elset, elset=Set-1, instance=Viga-1
 199, 200, 219, 220, 259, 260
*Nset, nset=Set-2, instance=Viga-1
   3,   4,  13,  27, 131
*Elset, elset=Set-2, instance=Viga-1
  19,  20, 179, 180, 221, 222
*Nset, nset=Set-3, instance=Viga-1
 5, 6
*End Assembly
**
** MATERIALS
**
*Material, name=Acero
*Elastic
210000., 0.3
*Plastic
355.,  0.
355., 0.1
**
** BOUNDARY CONDITIONS
**
** Name: BC-1 Type: Displacement/Rotation
*Boundary
Set-1, 1, 1
Set-1, 2, 2
Set-1, 3, 3
** Name: BC-2 Type: Displacement/Rotation
*Boundary
Set-2, 2, 2
Set-2, 3, 3
** ----------------------------------------------------------------
**
** STEP: Step-1
**
*IMPERFECTION,FILE=Shear_23_FIL, Step=1
1, 2.5
**
*Step, name=Step-1, nlgeom=YES, inc=300
*Static, riks
0.05, 1., 1e-09, 1.0, 5000,
**
** BOUNDARY CONDITIONS
**
** Name: BC-1 Type: Displacement/Rotation
*Boundary, op=NEW, load case=1
Set-1, 1, 1
Set-1, 2, 2
Set-1, 3, 3
** Name: BC-2 Type: Displacement/Rotation
*Boundary, op=NEW, load case=1
Set-2, 2, 2
Set-2, 3, 3
**
** LOADS
**
** Name: Load-1   Type: Concentrated force
*Cload
Set-3, 2, -125000.
**
** OUTPUT REQUESTS
**
*Restart, write, frequency=0
**
** FIELD OUTPUT: F-Output-1
**
*Output, field, variable=PRESELECT
*Node file
U
*End Step
