*Heading
    ** Generated by MatchFEM tool. UPC

    *Part, name=part
*NODE
1,   600.0,   250.0,     0.0
2,   600.0,   250.0,   100.0
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
*ELEMENT
*ELEMENT,  TYPE=S4R
1,       1,      17,     191,      36
2,      17,       2,      18,     191
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
*NSET, NSET=Set-1
   1,   4,   5,   8,   9,  11
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*NSET, NSET=Set-2
   1,   2,   3,   4,   5,   6
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*NSET, NSET=Set-3
   1,   2,   3,   4,   5,   6
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*NSET, NSET=ASSEMBLY-Set-1
 151, 121,  11,  12,  14
*NSET, NSET=ASSEMBLY-Set-2
 131,   3,   4,  27,  13
*NSET, NSET=ASSEMBLY-Set-3
   5,   6
*ELSET, ELSET=Set-1
  61,  62,  63,  64,  65,  66
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*ELSET, ELSET=Set-2
   1,   2,   3,   4,   5,   6
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*ELSET, ELSET=Set-3
  41,  42,  43,  44,  45,  46
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*ELSET, ELSET=ASSEMBLY.Set-1
 259, 260, 199, 200, 219, 220
*ELSET, ELSET=ASSEMBLY.Set-2
  19, 180,  20, 179, 221, 222
*End Part

*ASSEMBLY, NAME=Assembly

*INSTANCE, NAME=Viga-1, PART=Viga

*SHELL SECTION, ELSET=Set-2, MATERIAL=Acero
40.0, 5

*SHELL SECTION, ELSET=Set-3, MATERIAL=Acero
40.0, 5

*SHELL SECTION, ELSET=Set-1, MATERIAL=Acero
6.0, 5

*END INSTANCE

*END ASSEMBLY

*ELASTIC, TYPE=ISOTROPIC
210000.00000000003, 0.3
*Step, NAME=Step-1, NLGEOM=NO
*Static
1., 1., 1e-05, 1.
**
** BOUNDARY CONDITIONS
**
*BOUNDARY
ASSEMBLY.Set-1, 1, 1, 0
ASSEMBLY.Set-1, 2, 2, 0
ASSEMBLY.Set-1, 3, 3, 0
ASSEMBLY.Set-2, 2, 2, 0
ASSEMBLY.Set-2, 3, 3, 0
ASSEMBLY.Set-1, 1, 1, 0
ASSEMBLY.Set-1, 2, 2, 0
ASSEMBLY.Set-1, 3, 3, 0
ASSEMBLY.Set-2, 2, 2, 0
ASSEMBLY.Set-2, 3, 3, 0
**
** LOADS
**
*CLOAD
ASSEMBLY.Set-3, 2, -125000.0
**
** OUTPUT REQUESTS
**
*RESTART, WRITE, FREQUENCY=0**
** FIELD OUTPUT
**
*OUTPUT, FIELD, VARIABLE=PRESELECT
**
** HISTORY OUTPUT
**
*OUTPUT, HISTORY, VARIABLE=PRESELECT
*END STEP
